// SBML level 2 version 4

function Function_for_vTL1(cyt_mrna__LIGAND_, kTL1_1)
  kTL1_1*cyt_mrna__LIGAND_;
end

function Function_for_vTL2(cyt_mrna__RECEPTOR_, kTL2_1)
  kTL2_1*cyt_mrna__RECEPTOR_;
end

function Function_for_vTC1_1(Cytoplasm, kTC1_1, nuc_gene_a__LIGAND_)
  kTC1_1*nuc_gene_a__LIGAND_*Cytoplasm;
end

function Function_for_vTC2_1(Cytoplasm, kTC2_1, nuc_gene_a__RECEPTOR_)
  kTC2_1*nuc_gene_a__RECEPTOR_*Cytoplasm;
end

model _1()

  // Compartments:
  compartment Cytoplasm = 5.25e-12;
  compartment Nucleus = 1.75e-12;

  // Species:
  species cyt_prot__LIGAND_ in Cytoplasm = 0;
  species cyt_prot__RECEPTOR_ in Cytoplasm = 100;
  species cyt_prot__LIGAND__RECEPTOR_ in Cytoplasm = 0;
  species nuc_gene_a__LIGAND_ in Nucleus = 0.0009489016;
  species nuc_gene_i__LIGAND_ in Nucleus = 0.0009489016;
  species nuc_gene_a__RECEPTOR_ in Nucleus = 0.0009489016;
  species nuc_gene_i__RECEPTOR_ in Nucleus = 0.0009489016;
  species cyt_mrna__LIGAND_ in Cytoplasm = 0.001581503;
  species cyt_mrna__RECEPTOR_ in Cytoplasm = 0.001581503;

  // Parameters:
  kGac1_1 = 0.0005;
  kGac2_1 = 0.0005;
  kGin1_1 = 0.005;
  kGin2_1 = 0.005;
  kTC1_1 = 0.005;
  kTC2_1 = 0.005;
  kTCd1_1 = 5e-5;
  kTCd2_1 = 5e-5;
  kTL1_1 = 1;
  kTL2_1 = 1;
  kLR1_1 = 0.001;
  kLR2_1 = 0.001;
  kLR3_1 = 5e-5;
  kLR4_1 = 5e-5;
  kLR5_1 = 5e-5;

  // Reactions:
  vGac1: nuc_gene_i__LIGAND_ => nuc_gene_a__LIGAND_; Nucleus*kGac1_1*nuc_gene_i__LIGAND_;
  vGac2: nuc_gene_i__RECEPTOR_ => nuc_gene_a__RECEPTOR_; Nucleus*kGac2_1*nuc_gene_i__RECEPTOR_;
  vGin1: nuc_gene_a__LIGAND_ => nuc_gene_i__LIGAND_; Nucleus*kGin1_1*nuc_gene_a__LIGAND_;
  vGin2: nuc_gene_a__RECEPTOR_ => nuc_gene_i__RECEPTOR_; Nucleus*kGin2_1*nuc_gene_a__RECEPTOR_;
  vTC1: => cyt_mrna__LIGAND_; Function_for_vTC1_1(Cytoplasm, kTC1_1, nuc_gene_a__LIGAND_);  // modifiers: nuc_gene_a__LIGAND_
  vTC2: => cyt_mrna__RECEPTOR_; Function_for_vTC2_1(Cytoplasm, kTC2_1, nuc_gene_a__RECEPTOR_);  // modifiers: nuc_gene_a__RECEPTOR_
  vTCd1: cyt_mrna__LIGAND_ => ; Cytoplasm*kTCd1_1*cyt_mrna__LIGAND_;
  vTCd2: cyt_mrna__RECEPTOR_ => ; Cytoplasm*kTCd2_1*cyt_mrna__RECEPTOR_;
  vTL1: => cyt_prot__LIGAND_; Cytoplasm*Function_for_vTL1(cyt_mrna__LIGAND_, kTL1_1);  // modifiers: cyt_mrna__LIGAND_
  vTL2: => cyt_prot__RECEPTOR_; Cytoplasm*Function_for_vTL2(cyt_mrna__RECEPTOR_, kTL2_1);  // modifiers: cyt_mrna__RECEPTOR_
  vLR1: cyt_prot__LIGAND_ + cyt_prot__RECEPTOR_ => cyt_prot__LIGAND__RECEPTOR_; Cytoplasm*kLR1_1*cyt_prot__LIGAND_*cyt_prot__RECEPTOR_;
  vLR2: cyt_prot__LIGAND__RECEPTOR_ => cyt_prot__LIGAND_ + cyt_prot__RECEPTOR_; Cytoplasm*kLR2_1*cyt_prot__LIGAND__RECEPTOR_;
  vLR3: cyt_prot__LIGAND_ => ; Cytoplasm*kLR3_1*cyt_prot__LIGAND_;
  vLR4: cyt_prot__RECEPTOR_ => ; Cytoplasm*kLR4_1*cyt_prot__RECEPTOR_;
  vLR5: cyt_prot__LIGAND__RECEPTOR_ => ; Cytoplasm*kLR5_1*cyt_prot__LIGAND__RECEPTOR_;

  // Unit definitions:
  unit length = metre;
  unit area = metre^2;
  unit volume = litre;
  unit time = second;
  unit substance = 1e-9 mole;
end
